// COMSOL Multiphysics 6.4.0.429 model "ContactHeating_realistic.mph"
// Outline of the model tree

Parameters
  I0 = 1[A]  // contact current
  Rc = 30[mohm]  // contact interface resistance
  Rpin = 20[mohm]  // pin barrel + spring resistance
  rp = 1[mm]  // pin tip radius
  Lp = 8[mm]  // pin length above board
  tl = 50[um]  // contact layer thickness
  rb = 12[mm]  // board radius
  tb = 1.6[mm]  // board thickness
  kb = (385*35e-6+0.3*(1.6e-3-35e-6))/1.6e-3[W/(m*K)]  // homogenised FR4 + 1 oz Cu
  h0 = 10[W/(m^2*K)]  // natural convection
  Tamb = 40[degC]  // enclosure ambient
  sig_brass = 1.5e7[S/m]
  sig_pin_eff = Lp/(Rpin*pi*rp^2)  // pin with Rpin distributed
  sig_lay_val = tl/((Rc+Rpin)*pi*rp^2)  // validation: Rc+Rpin lumped at tip
  sig_lay_real = tl/(Rc*pi*rp^2)  // realistic: only Rc at the interface

Selections
  s_board_comp1: Box | entitydim = 2; xmin = -1; xmax = 13; ymin = -1.7; ymax = 0.01; condition = inside
  s_pin_comp1: Box "Box 1a" | entitydim = 2; xmin = -1; xmax = 1.01; ymin = -0.01; ymax = 8.01; condition = inside
  s_lay_comp1: Box "Box 1b" | entitydim = 2; xmin = -1; xmax = 1.01; ymin = 7.99; ymax = 8.06; condition = inside
  s_ec_comp1: Box "Box 1c" | entitydim = 2; xmin = -1; xmax = 1.01; ymin = -0.01; ymax = 8.06; condition = inside
  s_abrd_comp1: Box "Box 1d" | entitydim = 2; xmin = -1; xmax = 13; ymin = 8.04; ymax = 9.7; condition = inside
  b_pinbase_comp1: Box "Box 1e" | entitydim = 1; xmin = -0.01; xmax = 1.01; ymin = -0.01; ymax = 0.01; condition = inside
  b_tip_comp1: Box "Box 1f" | entitydim = 1; xmin = -0.01; xmax = 1.01; ymin = 8.04; ymax = 8.06; condition = inside
  b_pinside_comp1: Box "Box 1g" | entitydim = 1; xmin = 0.99; xmax = 1.01; ymin = -0.01; ymax = 8.01; condition = inside
  b_laysid_comp1: Box "Box 1h" | entitydim = 1; xmin = 0.99; xmax = 1.01; ymin = 7.99; ymax = 8.06; condition = inside
  b_btop_comp1: Box "Box 1i" | entitydim = 1; xmin = 0.99; xmax = 12.5; ymin = -0.01; ymax = 0.01; condition = inside
  b_bbot_comp1: Box "Box 1j" | entitydim = 1; xmin = -0.01; xmax = 12.5; ymin = -1.61; ymax = -1.59; condition = inside
  b_abot_comp1: Box "Box 1k" | entitydim = 1; xmin = 0.99; xmax = 12.5; ymin = 8.04; ymax = 8.06; condition = inside
  b_atop_comp1: Box "Box 1l" | entitydim = 1; xmin = -0.01; xmax = 12.5; ymin = 9.64; ymax = 9.66; condition = inside
  b_conv_comp1: Union
    entitydim = 1
    input = {b_pinside_comp1, b_laysid_comp1, b_btop_comp1, b_bbot_comp1, b_abot_comp1, b_atop_comp1}

Couplings
  maxop_comp1: Maximum on all domains
  intop_comp1: Integration on selection s_ec_comp1

Geometry
  g_comp1 "Geometry 1" (2D axisymmetric, length unit mm)
    board: Rectangle | size = {rb, tb}; pos = {0, -tb}
    pin: Rectangle | size = {rp, Lp}
    lay: Rectangle | size = {rp, tl}; pos = {0, Lp}
    abrd: Rectangle | size = {rb, tb}; pos = {0, Lp+tl}
    fin: Finalize "Form Union" | symmetriccoord = 8

Materials
  m_board_comp1: Common "Material 1" on selection s_board_comp1
    def: def "Basic"
      thermalconductivity = kb
      electricconductivity = 1e-6[S/m]
      relpermittivity = 1
      density = 8500
      heatcapacity = 380
  m_pin_comp1: Common "Material 1a" on selection s_pin_comp1
    def: def "Basic"
      thermalconductivity = 110[W/(m*K)]
      electricconductivity = sig_pin_eff
      relpermittivity = 1
      density = 8500
      heatcapacity = 380
  m_lay_comp1: Common "Material 1b" on selection s_lay_comp1
    def: def "Basic"
      thermalconductivity = 110[W/(m*K)]
      electricconductivity = sig_lay_real
      relpermittivity = 1
      density = 8500
      heatcapacity = 380
  m_abrd_comp1: Common "Material 1c" on selection s_abrd_comp1
    // same settings as m_board_comp1

Physics
  ec: ConductiveMedia "Electric Currents" on selection s_ec_comp1
    dependent variable V
    cucns1: CurrentConservationSolid "Current Conservation in Solids 1" (default)
    axi1: AxialSymmetry (default)
    ein1: ElectricInsulation (default)
    init1: init "Initial Values 1" (default)
    term1: Terminal "Boundary Terminal 1" on selection b_pinbase_comp1 | TerminalType = Current; I0 = I0
    gnd1: Ground on selection b_tip_comp1
  ht: HeatTransfer "Heat Transfer in Solids" on all domains
    dependent variable T
    solid1: SolidHeatTransferModel "Solid 1" (default)
    init1: init "Initial Values 1" (default) | Tinit = Tamb
    axi1: AxialSymmetry (default)
    ins1: ThermalInsulation (default)
    conv1: HeatFluxBoundary "Heat Flux 1" on selection b_conv_comp1
      HeatFluxType = ConvectiveHeatFlux
      h = h0
      Text = Tamb

Multiphysics
  emh1: ElectromagneticHeating on selection s_ec_comp1 | EMHeat_physics = ec; Heat_physics = ht

Mesh
  mesh_comp1 "Mesh 1"
    size: MeshSizeDefault | hauto = 2
    sz: Size on selection s_lay_comp1 | hmax = 0.02[mm]; custom = on
    ftri: FreeTri "Free Triangular" on remaining entities

Studies
  std1 "Study 1"
    stat: Stationary

Solver configurations
  sol1 "Solution 1" (study std1)
    v1: Variables "Dependent Variables 1"
    s1: Stationary "Stationary Solver 1"
      fc1: FullyCoupled
      d1: Direct "Direct (Merged)"

Datasets
  dset1: Solution | solution = sol1
  rev1: Revolve2D "Revolution 2D 1" | data = dset1; revangle = 270

Derived values
  gev_comp1: EvalGlobal "Global Evaluation 1" | data = dset1; expr = {I0*ec.V0_1, comp1.maxop_comp1(T)}; unit = {W, K}

Plots
  pg1: PlotGroup2D "Temperature (r-z section), I = 1 A, Rc = 30 mOhm" | data = dset1
    surf1: Surface | expr = T; unit = degC
    con1: Contour | expr = T; unit = degC
  pg2: PlotGroup3D "Temperature (3D, revolved)" | data = rev1
    surf1: Surface | expr = T; unit = degC
  pg3: PlotGroup2D "Current density |J|" | data = dset1
    surf1: Surface | expr = ec.normJ; unit = A/mm^2
    str1: Streamline | expr = {ec.Jr, ec.Jz}